B := 100
N := 256
L := 16
n := 0 .. L - 1
A4F2 := transpose([1, 0, 1, 0, 0, 1, 0, 0, 1, 1, 1, 1, 0, 0, 1, 0])
Mass := rbinom(N, 1, 0.5)
Massdv1[n] := n - Trunc(n, 2)
StekISH := stack(Massdv1, A4F2, Mass)
StekBIP := StekISH*2 - 1
τ := 0.01
fd := 800
Td := 1/fd
t := 0, Td .. τ*length(StekBIP) - Td/2
A(t, StekBIP) := StekBIP[floor(t/τ)]
Stek1[t/Td] := A(t, StekBIP)
null[4] := 0
Nf := 49
StekKON := stack(null, Stek1)
n1 := 0, 1 .. last(StekKON)
fsr := 0.1
FN4 := lowpass(fsr, Nf, 1)
n2 := 0, 1 .. last(FN4)
Signal := convol(FN4, StekKON)
n3 := 0, 1 .. last(Signal)
σ := 1
fdop := 0
φ := 0
fnes := 100
SignalREAL :=
    for x ∈ 0 .. last(Signal)
        X[x] ← Signal[x]*exp(-1j*2*π*fdop*Td*x)*exp(-1j*φ*x)
    X
pomexa1 := rnorm(length(SignalREAL), 0, σ)
pomexa2 := rnorm(length(SignalREAL), 0, σ)
I := vectorize(Re(SignalREAL) + pomexa1)
Q := vectorize(Im(SignalREAL) + pomexa2)
n4 := 280 .. 480
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SignalKON := convol(FN4, I)
n5 := 0, 1 .. last(SignalKON)
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semp := 8
por := 20
symbolsyn(X) :=
    ne ← 0
    nc ← 0
    na ← 0
    Cm ← 0
    cor ← 0
    for x ∈ 0 .. last(X)
        if x ≥ 2*semp - 1 and mod(x - semp, semp) == semp - 1
            j ← x + cor - 15
            S1 ← sum(X[m], m = j .. j + semp/2 - 1)
            S2 ← sum(X[m], m = j + 4 .. j + semp - 1)
            S3 ← sum(X[m], m = j + 8 .. j + 1.5*semp - 1)
            S4 ← sum(X[m], m = j + 12 .. j + 2*semp - 1)
            S12 ← S1 + S2
            S23 ← S2 + S3
            S34 ← S3 + S4
            Det[ne] ← 1 if Re(S12) > 0
            Det[ne] ← 0 otherwise
            ne ← ne + 1
            if sign(Re(S12)) ≠ sign(Re(S34))
                Cm ← Cm + sign(Re(S12))*Re(S23)
                Acc[na] ← Cm
                na ← na + 1
                if |Cm| > por
                    cor ← cor + sign(Cm)
                    ind ← x
                    Cor[nc] ← cor
                    Cm ← 0
                    nc ← nc + 1
    [Det; ind; Cor; Acc]
Symbols := symbolsyn(SignalKON) = [
    [
        0; 1; 1; 0; 1; 0; 0; 0; 1; 0
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    ];
    791;
    [-1; -2; -3; -2; -3];
    [
        -0.0998084; -1.17078; -3.47501; -2.77425; -11.7968; -16.8004; -11.1561; -7.01351; -10.5835; -15.4695
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    ]
]
Det := Symbols[0]
ind := Symbols[1]
Cor := Symbols[2]
Acc := Symbols[3]
n6 := 0 .. last(Acc)
y := if(Cor[0] < 0, 7, 6)
Cor = [-1; -2; -3; -2; -3]
Mess := submatrix(Det, y, length(StekISH) + y - 1, 0, 0)
OshMess := vectorize(StekISH xor Mess)
n7 := 0 .. last(OshMess)
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cadrsyn(X) :=
    C ← A4F2*2 - 1
    X ← X*2 - 1
    Mx ← 0
    for x ∈ 15 .. last(X)
        Z[x] ← sum(C[m]*X[x - length(C) + 1 + m], m = 0 .. length(C) - 1)
        if |Z[x]| > Mx
            ks ← x + 1
            Mx ← |Z[x]|
            obrwork ← sign(Z[x])
    [ks; Mx; obrwork; Z]
MessKON := cadrsyn(Det) = [
    39;
    16;
    1;
    [
        0; 0; 0; 0; 0; 0; 0; 0; 0; 0
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    ]
]
ks := MessKON[0]
Z := MessKON[3]
MassKON := submatrix(Det, ks, ks + N - 1, 0, 0)
transpose(MassKON) = [
    0, 0, 1, 0, 0, 0, 1, 0, 0, 0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]
transpose(Mass) = [
    0, 0, 1, 0, 1, 0, 1, 0, 0, 0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]
OshKON := sum(vectorize(MassKON xor Mass)) = 3
